*Heading
** Job name: Carrgamento_min_max Model name: Model-1
** Generated by: Abaqus/CAE Student Edition 2020
*Preprint, echo=NO, model=NO, history=NO, contact=NO
**
** PARTS
**
*Part, name=Part-1
*Node
      1,           0.,         -15.,         500.
      2,           0.,         -10.,         500.
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*Element, type=C3D8R
  1, 223, 224, 227, 226,   1,   2,   5,   4
  2, 224, 225, 228, 227,   2,   3,   6,   5
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*Nset, nset=_PickedSet7, internal, generate
   1,  888,    1
*Elset, elset=_PickedSet7, internal, generate
   1,  438,    1
** Section: Section-1
*Solid Section, elset=_PickedSet7, material=Material-1
,
*End Part
**
**
** ASSEMBLY
**
*Assembly, name=Assembly
**
*Instance, name=Part-1-1, part=Part-1
*End Instance
**
*Nset, nset=_PickedSet4, internal, instance=Part-1-1
   1,   2,   3, 223, 224, 225, 445, 446, 447, 667, 668, 669
*Elset, elset=_PickedSet4, internal, instance=Part-1-1
   1,   2, 147, 148, 293, 294
*Nset, nset=_PickedSet5, internal, instance=Part-1-1
 886, 888
*End Assembly
**
** MATERIALS
**
*Material, name=Material-1
*Density
 7.85e-09,
*Elastic
210000., 0.3
**
** BOUNDARY CONDITIONS
**
** Name: BC-1 Type: Symmetry/Antisymmetry/Encastre
*Boundary
_PickedSet4, ENCASTRE
** ----------------------------------------------------------------
**
** STEP: load_min
**
*Step, name=load_min, nlgeom=NO
*Static
1., 1., 1e-05, 1.
**
** LOADS
**
** Name: Load-3   Type: Gravity
*Dload
, GRAV, 9810., 0., -1., 0.
** Name: load_min   Type: Concentrated force
*Cload, op=NEW
_PickedSet5, 1, -50.
**
** OUTPUT REQUESTS
**
*Restart, write, frequency=0
**
** FIELD OUTPUT: F-Output-1
**
*Output, field, variable=PRESELECT
**
** HISTORY OUTPUT: H-Output-1
**
*Output, history, variable=PRESELECT
*End Step
** ----------------------------------------------------------------
**
** STEP: load_max
**
*Step, name=load_max, nlgeom=NO
*Static
1., 1., 1e-05, 1.
**
** LOADS
**
** Name: load_max   Type: Concentrated force
*Cload, op=NEW
_PickedSet5, 1, 50.
** Name: load_min   Type: Concentrated force
*Cload, op=NEW
**
** OUTPUT REQUESTS
**
*Restart, write, frequency=0
**
** FIELD OUTPUT: F-Output-1
**
*Output, field, variable=PRESELECT
**
** HISTORY OUTPUT: H-Output-1
**
*Output, history, variable=PRESELECT
*End Step
